// COMSOL Multiphysics 6.1.0.357 model "Cyclic voltammetry Model 1D WORKING.mph"
// Outline of the model tree

Parameters
  k0 = 0.01[cm/s]
  f = F_const/R_const/298[K]
  cRed0 = 0.002[mol/dm^3]
  cOx0 = 0[mol/dm^3]
  Eredox = 0 [V]  // Redox potential of species
  v = 0.02[V/s]  // scan rate
  t0 = 0[s]  // initial time
  Ei = -0.4[V]  // initial potential
  Ef = 0.4[V]  // final potential
  dt = 0.4020  // electrochemical step
  tf = (Ef-Ei)/v  // time duration of a sweep
  Dia = 0.7854[cm^2]  // Surface area of a 1 cm disk
  Numpt = 200  // Numbers of calculation

Variables
  var1 "Variables 1"
    E = (Ei + v * (t - t0)) * (t < tf) + (Ef - v * (t - tf)) * (t >= tf)

Geometry
  geom1 "Geometry 1" (1D, length unit m)
    i1: Interval | coordsource = vector; coordvec = 0, 0.00001, 0.001
    fin: Finalize "Form Union"

Physics
  tds: DilutedSpecies "Transport of Diluted Species" on domains 1, 2
    dependent variable cOx = {cOx, cRed}
    TransportMechanism.Convection = 0
    cdm1: ConvectionDiffusionMigration "Transport Properties 1" (default)
    nflx1: NoFlux (default)
    init1: init "Initial Values 1" (default) | initc = {cOx0, cRed0}
    fl1: FluxBoundary "Flux 1" on boundaries 1
      species = {1, 1}
      J0 = {k0*(cRed*exp(0.5*f*(E-Eredox))-cOx*exp(-0.5*f*(E-Eredox))), -k0*(cRed*exp(0.5*f*(E-Eredox))-cOx*exp(-0.5*f*(E-Eredox)))}
    reac1: Reactions (disabled) on no domains

Mesh
  mesh1 "Mesh 1"
    size: MeshSizeDefault | hmax = 6.7E-5; hgrad = 1.3; hauto = 1; custom = on
    edg1: Edge on entire geometry
      size1: Size on domains 1, 2 | hmax = 1.1e-6; custom = on; hgrad = 1.1
      size2: Size on domains 1, 2 | hmax = 3.3e-5; custom = on

Studies
  std1 "Study 1"
    time: Transient "Time Dependent" | tlist = range(0,dt,2*tf); rtol = 0.005

Solver configurations
  sol1 "Solution 1" (study std1)
    v1: Variables "Dependent Variables 1"
    t1: Time "Time-Dependent Solver 1" | tlist = range(0,dt,2*tf); rtol = 0.005; maxorder = 2; stabcntrl = on
      fc1: FullyCoupled
        linsolver = d1
        maxiter = 8
        damp = 0.9
        jtech = once
        stabacc = aacc
        aaccdim = 5
        aaccmix = 0.9
        aaccdelay = 1
      d1: Direct "Direct, concentrations (tds)" | linsolver = pardiso; pivotperturb = 1.0E-13

Datasets
  dset1: Solution | solution = sol1

Plots
  pg1: PlotGroup1D "Concentrations, All Species (tds)" | data = dset1; title = Concentrations, All Species
    lngr1: LineGraph "Species Ox" on domains 1, 2
      expr = cOx
      descr = Concentration
      xdata = expr
      xdataexpr = x
      autosolution = off
    lngr2: LineGraph "Species Red" on domains 1, 2 | expr = cRed; xdata = expr; xdataexpr = x; autosolution = off
  pg2: PlotGroup1D "Concentration, Ox (tds)" | data = dset1; prefixintitle = Species Ox:; typeintitle = off
    lngr1: LineGraph on domains 1, 2 | expr = cOx; descr = Concentration; xdata = expr; xdataexpr = x
  pg3: PlotGroup1D "Concentration, Red (tds)" | data = dset1; prefixintitle = Species Red:; typeintitle = off
    lngr1: LineGraph on domains 1, 2 | expr = cRed; xdata = expr; xdataexpr = x
  pg5: PlotGroup1D "1D Plot Group 5"
    data = dset1
    xlabel = Potential (V)
    ylabel = tds.ndflux_cRed*F_const (A/m<sup>2</sup>)
    ptgr1: PointGraph on boundaries 1 | expr = tds.ndflux_cRed*F_const; xdata = expr; xdataexpr = E

Exports
  img1: Image
    sourceobject = pg1
    size = presentation
    unit = px
    width = 874
    height = 656
    pngfilename = /home/zhao/Downloads/Downloads/Summary_Pack_new/Comsol_study/1d.png
    addsuffix = off
  img2: Image
    sourceobject = pg5
    size = presentation
    unit = px
    width = 874
    height = 656
    pngfilename = /home/zhao/Downloads/Downloads/Summary_Pack_new/Comsol_study/1dCV.png
    addsuffix = off